# Input voltage range:
Vinmin := 5
Vinmax := 30
# Nominal output voltage:
Vout := 24
# Maximum output current:
Iout := 4
# Switching Frequency:
Fsw := 30000
# Duty cycle range:
Dmin := Vout/(Vinmax + Vout)
Dmin = 0.444444
Dmax := Vout/(Vinmin + Vout)
Dmax = 0.827586
# Inductor Selection:
# Buck Mode:
L1 := Vout*(Vinmax - Vout)/(Fsw*Vinmax*Iout)
L1 = 4e-5
# Boost Mode:
L2 := Vinmin^2*(Vout - Vinmin)/(Fsw*Iout*Vout^2)
L2 = 6.87211e-6
L := max(L1, L2)
L = 4e-5
# Maximum switch current:
ΔImax := (Vinmax - Vout)*Dmax/(Fsw*L)
ΔImax = 4.13793
# Buck Mode:
Iswmax1 := ΔImax/2 + Iout
Iswmax1 = 6.06897
# Boost Mode:
Iswmax2 := ΔImax/2 + Iout/(1 - Dmin)
Iswmax2 = 9.26897
